# CALCULE DE BAZA SI DEFINITII
mM := 45 gm
mC := 200 gm
RPS := 1/s
mE := 60 gm
mECU := 60 gm  # rotations per second
mS := 300 gm
mBat := 400 gm
RPM := 1/(60*s)
nMotor := 4
# Proppeller
propDiam := 5*0.0256 m
propPitch := 4 in
propBlades := 3
Cp := 0.070  # Cp variaza intre 0.06 si 0.08
airDensity := 1.225 kg/m^3
mTotal := mM*nMotor + mC + mE + mECU + mS + mBat
mTotal = 1.2 kg
TWR := 3  # este coeficientul de manevrabilitate thrust to weight ratio
Ttotal := mTotal*g*TWR
g = 9.80665 m/s^2
# Ttotal si Tmotor reprezinta thrust motor si thrust total adica forta pe care trebuie sa o aiba insumate si separat motoarele
Ttotal = 35.3039 N
Tmotor := Ttotal/nMotor
Tmotor = 8.82599 N
GramsPerMotor := mTotal*TWR/nMotor  # GramsPerMotor este o variabila pentru cate grame poate ridica motorul indiferent de elice
GramsPerMotor = 900 gm
# CALCULE PENTRU INSTALATIA ELECTRICA
# SI MAXIME DE SOLICITARE
BatV := 14.8 V
# am ales un motor link
KV := 2350 RPM/V
MaxEPwr := 420 W  # marimea specificata de vanzator
MaxIdealRpm := KV*BatV
Efficiency := 0.8
MaxRealRpm := MaxIdealRpm*Efficiency
MaxRealRpm = 27824 RPM
MaxRealRps := MaxRealRpm
MaxRealRps = 463.733 RPS
Pmech := airDensity*Cp*MaxRealRpm^3*propDiam^5
Pmech = 293.825 W  # Puterea mecanica exercitata la solicitare maxima cu proppeler si rotatia motorului
Pelec := Pmech/Efficiency
Pelec = 367.281 W
# Pelec provine de la Puterea electrica necesara aceasta fiind mai mica decat cea specificata de producatorul motorului
#
# 367,281 < 420 W
#
# Se poate alege un motor mai mic sau mai slab
I := Pelec/BatV
I = 24.8163 A
# este necesara o instalatie pentru un curent de 24 de Amperi minim doar pentru a produce forta de lift.
